## Параметры транзистора
## Задание
β_0 := 50
U_к.доп := 12  # В
E_б0 := 0.25  # В
f_г := 4*10^6
r_б := 60
S_гр := 0.05
f_т := 500
## Параметры угла отсечки
θ := 80
α_0 := 0.286
## Параметры кварцевого резонатора
α_1 := 0.472
f_кв := 3.999931*10^6  # Гц
C_0 := 4*10^-12  # Ф
R_кв := 44  # Ом
Q_кв := 58000
P_кв := 0.2*10^-3  # Вт
## =================РАСЧЁТ===================
# Максимальная амплитуда импульса коллекторного тока
i_кm_max := sqrt(2*P_кв/(α_1^2*R_кв)) = 0.00638795  # А
i_кm := 5*10^-3  # А
# Первая гармоника коллекторного тока | Постоянная составляющая коллекторного тока
I_к1 := i_кm*α_1 = 0.00236  # А
I_к0 := i_кm*α_0 = 0.00143  # А
# Определяем параметры крутизны
S_0 := 15*β_0*i_кm/(15*i_кm*r_б + β_0) = 0.0688073  # А / В
S_1.0 := S_0*α_1*(1 - cos(θ)) = 0.0360621  # А / В
f_s := f_т/(S_0*r_б) = 121.111  # Фазовый угол крутизны
φ_s := -atan(f_г/f_s) = -1.57077
S_1 := S_1.0*cos(φ_s) = 1.09188e-6
# Амплитуда первой гармоники напряжения на базе
U_б := I_к1/S_1.0 = 0.0654426  # В
cos(-1.571) = -0.000203673
# Сопротивление резистора в эмиттерной цепи
R4 := U_б/(sqrt(2*P_кв/R_кв) - i_кm*α_1) = 99.8951
R_эм := R4/(1 + S_1*R4) = 99.8842
R'_эк := 0.25*R_кв = 11
# Параметр А
A := S_1.0*R_эм*R'_эк/(R_кв + R_эм + R'_эк) = 0.255819
# Отношение емкостей
K := A/(1 - A) = 0.34376
# Эквивалентное сопротивление контура
R_ЭК := R'_эк*(1 + K)^2/K^2 = 168.084
# Задаёмся добротностью конутра
Q_к := 50
## Параметры колебательной системы
ρ_к := R_ЭК/Q_к = 3.36167
C_к := 1/(2*π*ρ_к*f_кв) = 1.18362e-8  # Ф
L_к := ρ_к/(2*π*f_кв) = 1.33759e-7  # Гн
C_2 := C_к*(1 + K)/K = 4.62678e-8  # Ф
C_1 := K*C_2 = 1.5905e-8  # Ф
# Индуктивность, нейтрализующая ёмкость кварцедержателя
L_0 := 1/((2*π*f_кв)^2*C_0) = 0.0003958  # Гн
## Энергетические параметры автогенератора
# 1. Параметр δ1
δ_1 := ((1 + K)/K)^2*(R_кв + R_эм)/R_ЭК = 13.0804
# 2. Сопротивление коллекторной нагрузки
R_кн := R_ЭК/((1 + K)^2*(1 + 1/δ_1^2)) = 92.5446  # Ом
# 3. Амплитуда напряжения на коллекторе
U_к := i_кm*R_кн*α_1 = 0.218405  # В
## Параметры усилителя
# Проверка недонапряжённого режима
E_к := 0.5*U_к.доп = 6
U_к.гр := E_к - i_кm/S_гр = 5.9
U_к.гр > U_к → 1  # УРА!  # --> Проверка пройдена
# Расчёт мощности, потребляемой от источника напряжения
P_0 := I_к0*E_к*α_0 = 0.00245388  # Вт
# Расчёт мощности, отдаваемой транзистором
P_отдал := 0.5*U_к*i_кm*α_1 = 0.000257718  # Вт
# Расчёт мощности, рассеиваемой на коллекторе
P_к := P_0 - P_отдал = 0.00219616  # Вт
P_к2 := P_0 - P_кв = 0.00225388
# Коэффициент полезного действия коллекторной цепи
η := P_кв/P_0 = 0.0815036
## --Расчёт делителя--
# Постоянная составляющая тока базы
I_б0 := i_кm*α_0/β_0 = 2.86e-5  # А
# Напряжение смещения на базе
E_б := -U_б*cos(θ) + E_б0 = 0.257224  # В
# Ток базового делителя
I_дел := 10*I_б0 = 0.000286  # А
# Сопротивление в эмиттерной цепи
R_Э := 60/S_0 = 872  # Ом
# Напряжение источника коллектрного питания
E_ик := E_к + R_Э*(I_к0 + I_б0) = 7.2719  # В
# Сопротивление резистора R1 делителя
R_2 := (E_б + R_Э*(I_к0 + I_б0))/I_дел = 5346.58  # Ом
# Сопротивление резистора R2 делителя
R_1 := E_ик/I_дел - R_2 = 20079.6  # Ом
# Общее сопротивление делителя
R_дел := R_1*R_2/(R_1 + R_2) = 4222.31  # Ом
# Подбор ёмкости конденсатора
20/(2*π*f_г*R_Э) = 9.12586e-10  # Минимальная ёмкость Cэ
2*Q_к/(2*π*f_г*R_Э) = 4.56293e-9  # Максимальная ёмкость Cэ
# Ёмкость конденсатора в эмиттерной цепи
C_Э := 2.2*10^-9  # Ф  # Выбираем ёмкость конденсатора из стандартного ряда
# Ёмкость разделительного конденсатора
C_св.min := 1/(2*π*f_г*R_кн) = 4.29941e-10
## ==============РАСЧЁТ ОКОНЕЧНОГО КАСКАДА============
# Параметры транзистора:
# 1. Расчёт выходной цепи
u_к.доп := 60
I_к0.доп := 15
f_Т := 400
b_0 := 50
L_Э := 0.3*10^-9
t_к := 60
L_б := 1.5*10^-9
L_к := 1.5*10^-9
R_т.пк := 0.8
t_п.доп := 160
# 2. Мощность,рассчеиваемая на коллекторе
r_Б := 0.5
r_нас := 0.3
P_К := (t_п.доп - t_к)/R_т.пк = 125
# 3. Напряжение питания на коллекторе
E_К := u_к.доп/2 = 30
# 4. Крутизна линии граниченого режима
S_ГР := 1/r_нас = 3.33333
# Схема оконечного каскада
разделительные
L_р1 := 4.7/(2*π*5*10^6) = 1.49606e-7
L_р2 := 6.3/(2*π*5*10^6) = 2.00535e-7
C_р := 1/(2*π*5*10^6*4.7) = 6.77255e-9
C_бл1 := 1/(2*π*5*10^6*2*π*5*10^6*L_р1) = 6.77255e-9
C_бл2 := 1/(2*π*5*10^6*2*π*5*10^6*L_р2) = 5.05254e-9
C_рб := 1/(2*π*5*10^6*6.3) = 5.05254e-9
## ==========БЛОК КОММУТИРУЕМЫХ ФИЛЬТРОВ==============
m := log(20*10^6/(5*10^6))/log(1.6) = 2.94954
m := 3
kd := nthroot(20*10^6/(5*10^6), m) = 1.5874
z := 1.7
tn := z^2*2 = 5.78
